# 5-Level HANPC Three-Phase  Loss Calculation
# [area: Parameter from excel]
[FF; PP; LL; RR] := [3000; 1; 4.96; 0]
# [area: Unit Defination]
m := 1*m
cm := 10^-2*m
μH := 10^-6*H
A := 1*A
V := 1*V
W := 1*W
VA := 1*V*A
kV := 10^3*V
Oe := 1*Oe
s := 1*s
μs := 10^-6*s
T := 1*T
Hz := 1*Hz
Ω := 1*Ω
ns := 10^-9*s
mm := 10^-3*m
C := 1*C
kW := 10^3*W
ms := 10^-3*s
ohm := 1*ohm
mW := 10^-3*W
Gauss := 10^-4*T
kVA := 1000*V*A
MW := 10^6*W
pF := 10^-12*F
mH := 10^-3*H
kHz := 10^3*Hz
mJ := 10^-3*J
μJ := 10^-6*J
uH := 10^-6*H
us := 10^-6*s
mohm := 10^-3*ohm
uF := 10^-6*F
mΩ := 10^-3*Ω
hrs := 60*60*s
years := 365*24*hrs
# [area: Basic Information]
f_switch := FF*Hz
f0 := 2*f_switch = 6000 1/s
V_bus := 15*kV
f_sample := f0 = 6000 1/s
Ulrms := 10*kV
fs := 50*Hz
Ts := 1/fs = 0.02 s
T0 := 1/f0 = 0.000166667 s
Lo := LL*mH
Uprms := Ulrms/sqrt(3) = 5773.5 V
T_switch := 1/f_switch = 0.000333333 s
T_sample := 1/f_sample = 0.000166667 s
Um := 1
N_num1 := 5
Upm := Uprms*sqrt(2) = 8164.97 V
N_num2 := 10
Po := PP*MW
Iorms := Po/(sqrt(3)*Ulrms) = 57.735 A
Ud := V_bus/2 = 7500 V
PF := 1
Uorms := sqrt(Uprms^2 + (2*π*fs*Iorms*Lo)^2) = 5774.2 V
Uom := Uorms*sqrt(2) = 8165.96 V
Uam := 1
ma := Uom/Ud = 1.08879
Usm := Uam*ma = 1.08879
Iom := sqrt(2)*Iorms = 81.6497 A
α := atan(2*π*fs*Iorms*Lo/Uprms) = 0.015581
γ := fs*2*π/(f_sample*2) = 0.0261799
β := α - γ = -0.0105989
DT := 4*us
Current_ripple := RR
# [area: Mode Calculation]
t_time_step := 500*ns
t := 0*s, t_time_step .. Ts
# Modulation Waveform:
Usa_ori(t) := Usm*sin(2*π*fs*t)
Usb_ori(t) := Usm*sin(2*π*fs*t - 2*π/3)
Usc_ori(t) := Usm*sin(2*π*fs*t + 2*π/3)
Uadd(t) := (max(Usa_ori(t), Usb_ori(t), Usc_ori(t)) + min(Usa_ori(t), Usb_ori(t), Usc_ori(t)))/2
Usa(t) := Usa_ori(t) - Uadd(t)
Usb(t) := Usb_ori(t) - Uadd(t)
Usc(t) := Usc_ori(t) - Uadd(t)
# Carrier Waveform:
Ua_1(t) :=
    (Uam/(T_switch/2)*t) if t ≥ 0 and t < T_switch/2
    (-Uam/(T_switch/2)*(t - T_switch/2) + Uam) if t ≥ T_switch/2 and t < T_switch
    Ua_1(t - T_switch) otherwise
Ua1_1(t) := Ua_1(t)
Ua2_1(t) := Ua1_1(t) - Uam
Ua_2(t) :=
    (-Uam/(T_switch/2)*t + Uam) if t ≥ 0 and t < T_switch/2
    (Uam/(T_switch/2)*(t - T_switch/2)) if t ≥ T_switch/2 and t < T_switch
    Ua_2(t - T_switch) otherwise
Ua1_2(t) := Ua_2(t)
Ua2_2(t) := Ua1_2(t) - Uam
# Output Current And Voltage:
β := 4.975*10^-3
IL(t) := Iom*sin(2*π*fs*t + β)
Uoa(t) := Uom*sin(2*π*fs*t - γ)
Uob(t) := Uom*sin(2*π*fs*t - π*2/3 - γ)
Uoc(t) := Uom*sin(2*π*fs*t + 2*π/3 - γ)
Uog(t) := Upm*sin(2*π*fs*t + β)
Uoob(t) := Uob(t) - (min(Uoa(t), Uob(t), Uoc(t)) + max(Uoa(t), Uob(t), Uoc(t)))/2
Uooc(t) := Uoc(t) - (min(Uoa(t), Uob(t), Uoc(t)) + max(Uoa(t), Uob(t), Uoc(t)))/2
UL(t) := Uog(t) - Uoa(t)
Uooa(t) := Uoa(t) - (min(Uoa(t), Uob(t), Uoc(t)) + max(Uoa(t), Uob(t), Uoc(t)))/2
# Switching Time Calculation PhaseA:
Ka(t) := floor(t/T_switch)
Ka_1(t) := floor(t/(T_switch/2))
floor((t + Ta_delay + Ta/4)/Ta) =  # error: 该变量未定义。
Ta_delay =  # error
Tona_1(t) :=
    |Usa(Ka_1(t)*T_switch/2)/Uam*T_switch/2| if Usa(t) ≥ 0
    (T_switch/2 - |Usa(Ka_1(t)*T_switch/2)/Uam*T_switch/2|) otherwise
PWMa_1_contrast(t) := if(Usa(Ka_1(t)*T_switch/2) > Ua1_1(t) and Usa(t) ≥ 0, 1, 0) + if(|Usa(Ka_1(t)*T_switch/2)| > |Ua2_1(t)| and Usa(t) < 0, 1, 0)
PWMa_1(t) := if((2*Ka(t + T_switch/2) - 1)*T_switch/2 - Tona_1(t) + T_switch/2 ≤ t ≤ (2*Ka(t + T_switch/2) - 1)*T_switch/2 + Tona_1(t) + T_switch/2, 1, 0)
b
PWMa_2_contrast(t) := if(Usa(Ka_1(t)*T_switch/2) > Ua1_2(t) and Usa(t) ≥ 0, 1, 0) + if(|Usa(Ka_1(t)*T_switch/2)| > |Ua2_2(t)| and Usa(t) < 0, 1, 0)
PWMa_2(t) := if((2*Ka(t))*T_switch/2 - Tona_1(t) + T_switch/2 ≤ t ≤ (2*Ka(t))*T_switch/2 + Tona_1(t) + T_switch/2, 1, 0)
UA(t) := if(PWMa_1(t) > 0 and Usa(t) ≥ 0, Ud/2, 0) + if(PWMa_2(t) > 0 and Usa(t) ≥ 0, Ud/2, 0) + if(PWMa_2(t) ≤ 0 and Usa(t) < 0, -Ud/2, 0) + if(PWMa_1(t) ≤ 0 and Usa(t) < 0, -Ud/2, 0)
Ta2_1(t) := (2*Ka(t + T_switch/2) - 1)*T_switch/2 - Tona_1(t) + T_switch/2
Ta3_1(t) := (2*Ka(t + T_switch/2) - 1)*T_switch/2 + Tona_1(t) + T_switch/2
Ta2_2(t) := (2*Ka(t))*T_switch/2 - Tona_1(t) + T_switch/2
Ta3_2(t) := (2*Ka(t))*T_switch/2 + Tona_1(t) + T_switch/2
Ta2_S22_DT(t) := Ta2_2(t) + DT
Ta2_S21_DT(t) := Ta2_1(t) + DT
Ta3_S22_DT(t) := if(Tona_1(t) > DT, Ta3_2(t), Ta2_2(t) + DT)
Ta3_S21_DT(t) := if(Tona_1(t) > DT, Ta3_1(t), Ta2_1(t) + DT)
Ta2_S31_DT(t) := Ta2_2(t)
Ta2_S32_DT(t) := Ta2_1(t)
Ta3_S31_DT(t) := Ta3_S22_DT(t) + DT
Ta3_S32_DT(t) := Ta3_S21_DT(t) + DT
PWM_S22_DT(t) := if(Ta2_S22_DT(t) ≤ t ≤ Ta3_S22_DT(t), 1, 0)
PWM_S21_DT(t) := if(Ta2_S21_DT(t) ≤ t ≤ Ta3_S21_DT(t), 1, 0)
PWM_S32_DT(t) := if(Ta2_S32_DT(t) ≤ t ≤ Ta3_S32_DT(t), 0, 1)
PWM_S31_DT(t) := if(Ta2_S31_DT(t) ≤ t ≤ Ta3_S31_DT(t), 0, 1)
# [area: Current Ripple Calculation]
# Phase A:
Ka_cal(t) := floor(t/T0)
Tona_cal(t) :=
    ((Usa(Ka_1(t)*T_switch/2) - 1/2)/(Uam/2)*T0/2) if Usa(Ka_1(t)*T_switch/2) ≥ 1/2
    (Usa(Ka_1(t)*T_switch/2)/(Uam/2)*T0/2) if Usa(Ka_1(t)*T_switch/2) < 1/2 and Usa(Ka_1(t)*T_switch/2) ≥ 0
    (|Usa(Ka_1(t)*T_switch/2)|/(Uam/2)*T0/2) if Usa(Ka_1(t)*T_switch/2) ≥ -1/2 and Usa(Ka_1(t)*T_switch/2) < 0
    ((|Usa(Ka_1(t)*T_switch/2)| - 1/2)/(Uam/2)*T0/2) if Usa(Ka_1(t)*T_switch/2) < -1/2
PWMacal(t) := if((2*Ka_cal(t))*T0/2 - Tona_cal(t) + T0/2 ≤ t ≤ (2*Ka_cal(t))*T0/2 + Tona_cal(t) + T0/2 and Usa(Ka_1(t)*T_switch/2) ≥ 1/2, 1/2, 0) + if((2*Ka_cal(t + T0/2))*T0/2 - Tona_cal(t) ≤ t ≤ (2*Ka_cal(t + T0/2))*T0/2 + Tona_cal(t) and Usa(Ka_1(t)*T_switch/2) ≥ 0 and Usa(Ka_1(t)*T_switch/2) < 1/2, 1/2, 0) + if(Usa(Ka_1(t)*T_switch/2) ≥ 1/2, 1/2, 0) + (if((2*Ka_cal(t))*T0/2 - Tona_cal(t) + T0/2 ≤ t ≤ (2*Ka_cal(t))*T0/2 + Tona_cal(t) + T0/2 and Usa(Ka_1(t)*T_switch/2) < -1/2, -1/2, 0) + if((2*Ka_cal(t + T0/2))*T0/2 - Tona_cal(t) ≤ t ≤ (2*Ka_cal(t + T0/2))*T0/2 + Tona_cal(t) and Usa(Ka_1(t)*T_switch/2) < 0 and Usa(Ka_1(t)*T_switch/2) ≥ -1/2, -1/2, 0) + if(Usa(Ka_1(t)*T_switch/2) < -1/2, -1/2, 0))
Ta2p_N(t) := (2*Ka_cal(t))*T0/2 + T0/2
Ta2p_4(t) := (2*Ka_cal(t))*T0/2 + T0
Ta2p_1(t) := (2*Ka_cal(t))*T0/2
Ta2p_2(t) := (2*Ka_cal(t))*T0/2 - Tona_cal(t) + T0/2
Ta2p_3(t) := (2*Ka_cal(t))*T0/2 + Tona_cal(t) + T0/2
Ta1p_4(t) := (2*Ka_cal(t))*T0/2 + T0
Ta1p_3(t) := ((2*Ka_cal(t))*T0/2 - Tona_cal(t)) + T0
Ta1p_1(t) := (2*Ka_cal(t))*T0/2
Ta1p_2(t) := (2*Ka_cal(t))*T0/2 + Tona_cal(t)
Ta1p_N(t) := (2*Ka_cal(t))*T0/2 + T0/2
Ta1n_N(t) := (2*Ka_cal(t))*T0/2 + T0/2
Ta1n_1(t) := (2*Ka_cal(t))*T0/2
Ta1n_2(t) := (2*Ka_cal(t))*T0/2 + Tona_cal(t)
Ta1n_3(t) := ((2*Ka_cal(t))*T0/2 - Tona_cal(t)) + T0
Ta1n_4(t) := (2*Ka_cal(t))*T0/2 + T0
Ta2n_N(t) := (2*Ka_cal(t))*T0/2 + T0/2
Ta2n_1(t) := (2*Ka_cal(t))*T0/2
Ta2n_2(t) := (2*Ka_cal(t))*T0/2 - Tona_cal(t) + T0/2
Ta2n_3(t) := (2*Ka_cal(t))*T0/2 + Tona_cal(t) + T0/2
Ta2n_4(t) := (2*Ka_cal(t))*T0/2 + T0
UA_2P_ripple1(t) := if(Usa(Ka_1(t)*T_switch/2) ≥ 1/2 and Ta2p_1(t) < t < Ta2p_2(t), ((Uooa(t) + Uooa(Ta2p_1(t)))/2 - Ud/2)*(t - Ta2p_1(t))/Lo, 0)
UA_2P_ripple2(t) := if(Usa(Ka_1(t)*T_switch/2) ≥ 1/2 and Ta2p_2(t) < t < Ta2p_3(t), ((Uooa(t) + Uooa(Ta2p_2(t)))/2 - Ud)*(t - Ta2p_2(t))/Lo + ((Uooa(Ta2p_2(t)) + Uooa(Ta2p_1(t)))/2 - Ud/2)*(Ta2p_2(t) - Ta2p_1(t))/Lo, 0)
UA_2P_ripple3(t) := if(Usa(Ka_1(t)*T_switch/2) ≥ 1/2 and Ta2p_3(t) < t < Ta2p_4(t), ((Uooa(t) + Uooa(Ta2p_4(t)))/2 - Ud/2)*(t - Ta2p_4(t))/Lo, 0)
UA_2P_ripple(t) := UA_2P_ripple1(t) + UA_2P_ripple2(t) + UA_2P_ripple3(t)
UA_1P_ripple1(t) := if(Usa(Ka_1(t)*T_switch/2) ≥ 0 and Usa(Ka_1(t)*T_switch/2) < 1/2 and Ta1p_1(t) < t < Ta1p_2(t), ((Uooa(t) + Uooa(Ta1p_1(t)))/2 - Ud/2)*(t - Ta1p_1(t))/Lo, 0)
UA_1P_ripple2(t) := if(Usa(Ka_1(t)*T_switch/2) ≥ 0 and Usa(Ka_1(t)*T_switch/2) < 1/2 and Ta1p_2(t) < t < Ta1p_3(t), ((Uooa(t) + Uooa(Ta1p_2(t)))/2 - 0)*(t - Ta1p_2(t))/Lo + ((Uooa(Ta1p_2(t)) + Uooa(Ta1p_1(t)))/2 - Ud/2)*(Ta1p_2(t) - Ta1p_1(t))/Lo, 0)
UA_1P_ripple3(t) := if(Usa(Ka_1(t)*T_switch/2) ≥ 0 and Usa(Ka_1(t)*T_switch/2) < 1/2 and Ta1p_3(t) < t < Ta1p_4(t), ((Uooa(t) + Uooa(Ta1p_4(t)))/2 - Ud/2)*(t - Ta1p_4(t))/Lo, 0)
UA_1P_ripple(t) := UA_1P_ripple1(t) + UA_1P_ripple2(t) + UA_1P_ripple3(t)
UA_1N_ripple1(t) := if(Usa(Ka_1(t)*T_switch/2) ≥ -1/2 and Usa(Ka_1(t)*T_switch/2) < 0 and Ta1n_1(t) < t < Ta1n_2(t), ((Uooa(t) + Uooa(Ta1n_1(t)))/2 + Ud/2)*(t - Ta1n_1(t))/Lo, 0)
UA_1N_ripple2(t) := if(Usa(Ka_1(t)*T_switch/2) ≥ -1/2 and Usa(Ka_1(t)*T_switch/2) < 0 and Ta1n_2(t) < t < Ta1n_3(t), ((Uooa(t) + Uooa(Ta1n_2(t)))/2 + 0)*(t - Ta1n_2(t))/Lo + ((Uooa(Ta1n_2(t)) + Uooa(Ta1n_1(t)))/2 + Ud/2)*(Ta1n_2(t) - Ta1n_1(t))/Lo, 0)
UA_1N_ripple3(t) := if(Usa(Ka_1(t)*T_switch/2) ≥ -1/2 and Usa(Ka_1(t)*T_switch/2) < 0 and Ta1n_3(t) < t < Ta1n_4(t), ((Uooa(t) + Uooa(Ta1n_4(t)))/2 + Ud/2)*(t - Ta1n_4(t))/Lo, 0)
UA_1N_ripple(t) := UA_1N_ripple1(t) + UA_1N_ripple2(t) + UA_1N_ripple3(t)
UA_2N_ripple1(t) := if(Usa(Ka_1(t)*T_switch/2) < -1/2 and Ta2n_1(t) < t < Ta2n_2(t), ((Uooa(t) + Uooa(Ta2n_1(t)))/2 + Ud/2)*(t - Ta2n_1(t))/Lo, 0)
UA_2N_ripple2(t) := if(Usa(Ka_1(t)*T_switch/2) < -1/2 and Ta2n_2(t) < t < Ta2n_3(t), ((Uooa(t) + Uooa(Ta2n_2(t)))/2 + Ud)*(t - Ta2n_2(t))/Lo + ((Uooa(Ta2n_2(t)) + Uooa(Ta2n_1(t)))/2 + Ud/2)*(Ta2n_2(t) - Ta2n_1(t))/Lo, 0)
UA_2N_ripple3(t) := if(Usa(Ka_1(t)*T_switch/2) < -1/2 and Ta2n_3(t) < t < Ta2n_4(t), ((Uooa(t) + Uooa(Ta2n_4(t)))/2 + Ud/2)*(t - Ta2n_4(t))/Lo, 0)
UA_2N_ripple(t) := UA_2N_ripple1(t) + UA_2N_ripple2(t) + UA_2N_ripple3(t)
UA_ripple(t) := UA_1P_ripple(t) + UA_2P_ripple(t) + UA_1N_ripple(t) + UA_2N_ripple(t)
# Three Phase Superposition:
UB_ripple(t) := UA_ripple(t - 1/(3*fs))
UC_ripple(t) := UA_ripple(t + 1/(3*fs))
UA_ripple_in3ph(t) := UA_ripple(t)*2/3 - UB_ripple(t)/3 - UC_ripple(t)/3
IL_all(t) :=
    (UA_ripple_in3ph(t) + IL(t)) if Current_ripple == 1
    IL(t) otherwise
# [area: Transistor Datasheet]
# Loss of Mos and Diodie
# [component: outputs Eon_S_25]
# [component: outputs Eoff_S_25]
# [component: outputs VD_18V25]
# [component: outputs VD_0V25]
# [component: outputs VDS_18V]
Err_S_25 := [
    51.6884, 0.0406927;
    59.1818, 0.0774038;
    70.4179, 0.078416;
    82.403, 0.0794958;
    92.1409, 0.080373;
    103.377, 0.0813853;
    112.363, 0.0461588;
    122.101, 0.0470361;
    133.34, 0.0840847;
    141.579, 0.084827;
    151.32, 0.121741;
    162.553, 0.0867165;
    175.287, 0.0878637;
    186.524, 0.088876;
    197.76, 0.0898882;
    206.746, 0.0546618;
    217.982, 0.055674;
    229.967, 0.0567538;
    247.195, 0.0583059;
    259.189, 0.167494;
    272.666, 0.0966366;
    283.151, 0.0615451;
    295.136, 0.0626248;
    310.866, 0.064042;
    321.35, 0.0289505;
    330.342, 0.0657966;
    342.33, 0.102913;
    350.57, 0.103655
]
Es_on_25(y_25) := linterp(Eon_S_25[:, 0]*A, Eon_S_25[:, 1]*mJ, y_25)
Vds_18V(i) := linterp(VDS_18V[:, 0]*A, VDS_18V[:, 1]*V, i)
Es_off_25(y_25) := linterp(Eoff_S_25[:, 0]*A, Eoff_S_25[:, 1]*mJ, y_25)
Vsd_18V(i) := linterp(VD_18V25[:, 0]*A, VD_18V25[:, 1]*V, i)
Es_rr_25(y_25) := linterp(Err_S_25[:, 0]*A, Err_S_25[:, 1]*mJ, y_25)
Vsd_0V(i) := linterp(VD_0V25[:, 0]*A, VD_0V25[:, 1]*V, i)
y_25 := 0, 1*A .. 400*A
i := 0, 1*A .. 400*A
# 600*V | 600*V
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# [area: Loss Calculation]
# NO DT
I_positive(t) := if(IL_all(t) > 0, IL_all(t), 0)
I_negative(t) := if(IL_all(t) < 0, -IL_all(t), 0)
P_S22_Eon_25 := N_num1*sum(Es_on_25(I_negative(Ta2_2(t))), t)/(Ts*T_switch/t_time_step) = 25.0972 W
P_S21_Eon_25 := N_num1*sum(Es_on_25(I_negative(Ta2_1(t))), t)/(Ts*T_switch/t_time_step) = 25.0965 W
P_S21_Eoff_25 := N_num1*sum(Es_off_25(I_negative(Ta3_1(t))), t)/(Ts*T_switch/t_time_step) = 7.30575 W
P_S22_Eoff_25 := N_num1*sum(Es_off_25(I_negative(Ta3_2(t))), t)/(Ts*T_switch/t_time_step) = 7.30529 W
P_S32_Eon_25 := N_num1*sum(Es_on_25(I_positive(Ta3_1(t))), t)/(Ts*T_switch/t_time_step) = 25.0912 W
P_S31_Eon_25 := N_num1*sum(Es_on_25(I_positive(Ta3_2(t))), t)/(Ts*T_switch/t_time_step) = 25.0897 W
P_S32_Eoff_25 := N_num1*sum(Es_off_25(I_positive(Ta2_1(t))), t)/(Ts*T_switch/t_time_step) = 7.30245 W
P_S31_Eoff_25 := N_num1*sum(Es_off_25(I_positive(Ta2_2(t))), t)/(Ts*T_switch/t_time_step) = 7.30249 W
P_S21_swithch_25 := P_S21_Eon_25 + P_S21_Eoff_25 = 32.4023 W
P_S22_swithch_25 := P_S21_Eon_25 + P_S21_Eoff_25 = 32.4023 W
P_S32_swithch_25 := P_S32_Eon_25 + P_S32_Eoff_25 = 32.3936 W
P_S31_swithch_25 := P_S32_Eon_25 + P_S32_Eoff_25 = 32.3936 W
P_S22_conduct_25 := fs*N_num1*sum(if(Ta2_2(t) ≤ t < Ta3_2(t), I_negative(t)*Vds_18V(I_negative(t))*t_time_step, 0), t) = 4.76192 W
P_S21_conduct_25 := fs*N_num1*sum(if(Ta2_1(t) ≤ t < Ta3_1(t), I_negative(t)*Vds_18V(I_negative(t))*t_time_step, 0), t) = 4.76531 W
P_S22D_conduct_25 := fs*N_num1*sum(if(Ta2_2(t) ≤ t < Ta3_2(t), I_positive(t)*Vsd_18V(I_positive(t))*t_time_step, 0), t) = 36.9014 W
P_S21D_conduct_25 := fs*N_num1*sum(if(Ta2_1(t) ≤ t < Ta3_1(t), I_positive(t)*Vsd_18V(I_positive(t))*t_time_step, 0), t) = 36.9047 W
P_S31_conduct_25 := fs*N_num1*sum(if(Ta2_2(t) ≤ t < Ta3_2(t), 0, I_positive(t)*Vds_18V(I_positive(t))*t_time_step), t) = 4.76531 W
P_S32_conduct_25 := fs*N_num1*sum(if(Ta2_1(t) ≤ t < Ta3_1(t), 0, I_positive(t)*Vds_18V(I_positive(t))*t_time_step), t) = 4.76192 W
P_S31D_conduct_25 := fs*N_num1*sum(if(Ta2_2(t) ≤ t < Ta3_2(t), 0, I_negative(t)*Vsd_18V(I_negative(t))*t_time_step), t) = 36.9047 W
P_S32D_conduct_25 := fs*N_num1*sum(if(Ta2_1(t) ≤ t < Ta3_1(t), 0, I_negative(t)*Vsd_18V(I_negative(t))*t_time_step), t) = 36.9014 W
P_S1Snp2_conduct_25 := fs*N_num2*sum(if(Usa(t) ≥ 0, I_negative(t)*Vds_18V(I_negative(t))*t_time_step + I_positive(t)*Vsd_18V(I_positive(t))*t_time_step, 0), t) = 83.3333 W
P_S1Snp2Snp1S4_switch_25 := (if(IL_all(0) ≥ 0, Es_off_25(I_positive(0)), Es_on_25(I_negative(0)))/Ts + if(IL_all(Ts/2) ≥ 0, Es_on_25(I_positive(0)), Es_off_25(I_negative(0)))/Ts)*N_num2 = 0.257287 W
P_Snp1S4_conduct_25 := fs*N_num2*sum(if(Usa(t) < 0, I_negative(t)*Vsd_18V(I_negative(t))*t_time_step + I_positive(t)*Vds_18V(I_positive(t))*t_time_step, 0), t) = 83.3333 W
P_S_switch_25 := P_S21_swithch_25 + P_S32_swithch_25 + P_S22_swithch_25 + P_S31_swithch_25 + P_S1Snp2Snp1S4_switch_25 = 129.849 W
P_S_conduct_25 := P_S21_conduct_25 + P_S21D_conduct_25 + P_S32_conduct_25 + P_S32D_conduct_25 + P_S22_conduct_25 + P_S22D_conduct_25 + P_S31_conduct_25 + P_S31D_conduct_25 + P_S1Snp2_conduct_25 + P_Snp1S4_conduct_25 = 333.333 W
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P_Loss_25 := P_S_switch_25 + P_S_conduct_25 = 463.182 W
η_25 := 1 - 3*P_Loss_25/Po = 0.99861
OUT := η_25
# DT
fs*N_num2*sum(I_negative(t)*Vsd_18V(I_negative(t))*t_time_step, t) = 83.3333 W
I_negative(t) =  # no stored result
